bbdfg
mkZ(y, t0, tk, N, D) :=
    Z0 ← rkfixed(y, t0, tk, N, D)
    n ← rows(Z0) - 1
    for i ∈ 0 .. n
        cy[0] ← Z0[:, 1][i]
        cy_[i] ← D(Z0[:, 0][i], cy)
    return augment(Z0, cy_)
mkEx1(t0, tb, N) :=
    T ← 2
    a ← [T; 1]
    D(x, y) ← -a[1]/a[0]*y[0]
    IC[0] ← 0.5
    Z ← mkZ(IC, t0, tb, N, D)
    return Z
DZ1 := mkEx1(0, 10, 100)
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mkMatrA(va) :=
    n ← rows(va)
    for i ∈ 1 .. n - 1
        for j ∈ 0 .. i - 1
            r[i - 1, j] ← va[i - 1 - j]
    1
    return r
mkVecD_Type1(b, va) :=
    n ← rows(va) - 1
    r[n - 1] ← b
    return r
mkMatrA(transpose([2, 4, 10])) = [2, 0; 4, 2]
mkVecD_Type1(1, transpose([2, 4, 10])) = [0; 1]
mk_ΔIC_Type1(va, b) :=
    A ← mkMatrA(va)
    d ← mkVecD_Type1(b, va)
    r ← lsolve(A, d)
    return r
mk_ΔIC_Type1(transpose([2, 4, 10]), 1) = [0; 0.5]
T_ex1 := 2
mkEx1_2(t0, tb, N) :=
    zeroIC ← 0
    va ← transpose([T_ex1, 1])
    b ← 1
    ΔIC ← mk_ΔIC_Type1(va, b)
    IC ← zeroIC + ΔIC
    D(x, y) ← -va[1]/va[0]*y[0]
    Z ← rkfixed(IC, t0, tb, N, D)
    return Z
DZ1 := mkEx1_2(0, 10, 100)
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# analitycal solution
y_ex1(t) := 1/T_ex1*exp(-t/T_ex1)
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mkEx2(t0, tb, N) :=
    zeroIC ← transpose([0, 0])
    va ← transpose([2, 4, 10])
    b ← 1
    ΔIC ← mk_ΔIC_Type1(va, b)
    IC ← zeroIC + ΔIC
    D(x, y) ← [y[1]; -va[1]*y[1]/va[0] + (-va[2]*y[0]/va[0])]
    Z ← rkfixed(IC, t0, tb, N, D)
    return Z
1/4*exp(-t)*sin(2*t)
# analitycal solution
DZ2 := mkEx2(0, 10, 100)
AZ2 :=
    r[:, 0] ← DZ2[:, 0]
    r[:, 1] ← vectorize(1/4*exp(-r[:, 0])*sin(2*r[:, 0]))
    return r
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1/(2*s^2 + 4*s + 10) invlaplace → sin(2*t)*e^(-t)/4
[2, 0; 4, 2]^-1 = [0.5, 0; -1, 0.5]
mkIC_Type1(va, b, IC0) :=
    ΔIC ← mk_ΔIC_Type1(va, b)
    IC ← IC0 + ΔIC
    return IC
mkD_Type1(va) :=
    D(x, y) ← [
        y[1];
        {
            n ← rows(va)
            -sum(y[i]*va[n - 1 - i]/va[0], i = 0 .. n - 2)
        }
    ]
    D
mkSlnT1(va, b, IC0, t0, tb, N) :=
    IC ← mkIC_Type1(va, b, IC0)
    D ← mkD_Type1(va)
    Z ← rkfixed(IC, t0, tb, N, D)
    return Z
mkEx3(t0, tb, N) :=
    zeroIC ← transpose([0, 0])
    va ← transpose([1, 2, 2])
    b ← 1
    Z ← mkSlnT1(va, b, zeroIC, t0, tb, N)
    return Z
# analitycal solution
1/(1*s^2 + 2*s + 2) invlaplace → e^(-t)*sin(t)
DZ3 := mkEx3(0, 10, 100)
AZ3 :=
    r[:, 0] ← DZ2[:, 0]
    r[:, 1] ← vectorize(1/1*exp(-r[:, 0])*sin(r[:, 0]))
    return r
[1, 0; 2, 1]^-1 = [1, 0; -2, 1]
[1, 0; 2, 1]^-1*[0; 1] = [0; 1]
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extractIC(Z) :=
    n ← rows(Z)
    lastRow ← submatrix(Z, n - 1, n - 1, 1, cols(Z) - 1)
    lastRow
mkSlnT1_b(va, b, c, IC0, t0, tb, N) :=
    D ← mkD_Type1(va)
    if c < t0 or c ≥ tb
        Z ← rkfixed(IC0, t0, tb, N, D)
        return Z
    ΔIC ← mk_ΔIC_Type1(va, b)
    if t0 == c
        Z ← mkSlnT1(va, b, IC0, t0, tb, N)
        return Z
    1
    Z1 ← rkfixed(IC0, t0, c, N, D)
    IC1_ ← extractIC(Z1)
    1
    IC1 ← transpose(IC1_) + ΔIC
    Z2 ← rkfixed(IC1, c, tb, N, D)
    Z ← stack(Z1, Z2)
    return Z
Hev(t) :=
    return 0 if t ≤ 0
    return 1 otherwise
mkEx4(t0, tb, N, c) :=
    zeroIC ← transpose([0, 0])
    va ← transpose([1, 2, 2])
    b ← 1
    Z ← mkSlnT1_b(va, b, c, zeroIC, t0, tb, N)
    Z
c_ex4 := 2
y_ex4(t) := Hev(t - c_ex4)*exp(-(t - c_ex4))*sin(t - c_ex4)
DZ4 := mkEx4(0, 10, 100, c_ex4)
AZ4 :=
    r[:, 0] ← DZ4[:, 0]
    for j ∈ 0 .. rows(r[:, 0]) - 1
        r[j, 1] ← y_ex4(r[j, 0])
    return r
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mkEx5(t0, tb, N, c) :=
    zeroIC ← transpose([0, 0])
    va ← transpose([1, 0, 1])
    b ← 4
    Z ← mkSlnT1_b(va, b, c, zeroIC, t0, tb, N)
    Z
c_ex5 := 2*π
DZ5 := mkEx5(0, 15, 100, c_ex5)
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mkEx6(t0, tb, N, c) :=
    zeroIC ← transpose([1, 0])
    va ← transpose([1, 0, 1])
    b ← 4
    Z ← mkSlnT1_b(va, b, c, zeroIC, t0, tb, N)
    Z
DZ6 := mkEx6(0, 15, 100, c_ex5)
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mkSlnT1_b(va, b, c, IC0, t0, tb, N) :=
    D ← mkD_Type1(va)
    if c < t0 or c ≥ tb
        Z ← rkfixed(IC0, t0, tb, N, D)
        return Z
    ΔIC ← mk_ΔIC_Type1(va, b)
    if t0 == c
        Z ← mkSlnT1(va, b, IC0, t0, tb, N)
        return Z
    1
    Z1 ← rkfixed(IC0, t0, c, N, D)
    IC1_ ← extractIC(Z1)
    1
    IC1 ← transpose(IC1_) + ΔIC
    Z2 ← rkfixed(IC1, c, tb, N, D)
    Z ← stack(Z1, Z2)
    return Z
mkSlnT1_c(va, vb, vc, IC0, t0, tb, N) :=
    tuple_vb_vc ← augment(vc, vb)
    sv ← csort(tuple_vb_vc, 0)
    r[1] ← sv
    r[0] ← tuple_vb_vc
    redR ← reduce_vcb(sv)
    IC ← IC0
    for i ∈ 0 .. rows(redR)
        Z[i] ← □
    r  # error: Эта метка - заполнитель пуста.
reduce_vcb(vcb) :=
    n ← rows(vcb)
    j ← 0
    r[j, 0] ← vcb[j, 0]
    r[j, 1] ← vcb[j, 1]
    for i ∈ 1 .. n - 1
        r[j, 1] ← r[j, 1] + vcb[i, 1] if r[j, 0] == vcb[i, 0]
        otherwise
            j ← j + 1
            r[j, 0] ← vcb[j, 0]
            r[j, 1] ← vcb[j, 1]
    1
    return r
zeroIC ← transpose([1, 0])
va ← transpose([1, 0, 1])
M := mkSlnT1_c([1; 0; 1], [2; 1; 3], [2*π; π; 2*π], [1; 0], 0, 10, 100)  # error: Эта переменная неопределена.
M[0] =  # error: Эта переменная неопределена.
M[1] =  # error
reduce_vcb(M[1]) =  # error
